# OpenSim document version 40000
Model arm26:
  gravity: 0 -9.8066 0
  length_units: meters
  force_units: N
  credits:
    The OpenSim Development Team (Reinbolt, J; Seth, A; Habib, A; Hamner, S) adapted from a model originally created by Kate Holzbaur (11/22/04) License: Creative Commons (CCBY 3.0). You are free to distribute, remix, tweak, and build upon this work, even commercially, as long as you credit us for the original creation. http://creativecommons.org/licenses/by/3.0/
  publications:
    Holzbaur, K.R.S., Murray, W.M., Delp, S.L. A Model of the Upper Extremity for Simulating Musculoskeletal Surgery and Analyzing Neuromuscular Control. Annals of Biomedical Engineering, vol 33, pp 829–840, 2005
  Ground: meshes=(ground_ribs.vtp ground_spine.vtp ground_skull.vtp ground_jaw.vtp ground_r_clavicle.vtp ground_r_scapula.vtp)
    WrapCylinder TRIlongglen: xyz_body_rotation=(1.37532 -0.294612 2.43596) translation=(-0.043905 -0.0039 0.1478)
        quadrant=x radius=0.003 length=0.03
  BodySet:
    Body r_humerus: mass=1.864572 [kg] mass_center=(0 -0.180496 0) inertia=(0.01481 0.004551 0.013193 0 0 0)
        meshes=arm_r_humerus.vtp
      WrapEllipsoid TRIlonghh: xyz_body_rotation=(3.00162 -0.853466 2.57419) translation=(-0.0078 -0.0041 -0.0014)
          quadrant=z dimensions=(0.035 0.02 0.02)
      WrapEllipsoid BIClonghh: xyz_body_rotation=(-2.00434 -1.00164 0.975465) translation=(0.0033 0.0073 0.0003)
          quadrant=-y dimensions=(0.025 0.02 0.02)
      WrapCylinder TRI: xyz_body_rotation=(-0.14015 -0.00628319 0.154985) translation=(0.0028 -0.2919 -0.0069)
          quadrant=all radius=0.016 length=0.05
    Body r_ulna_radius_hand: mass=1.534315 mass_center=(0 -0.181479 0) inertia=(0.019281 0.001571 0.020062 0 0 0)
        meshes=(arm_r_ulna.vtp arm_r_radius.vtp arm_r_lunate.vtp arm_r_scaphoid.vtp arm_r_pisiform.vtp arm_r_triquetrum.vtp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)
  JointSet:
    CustomJoint r_shoulder: socket_parent_frame=ground_offset socket_child_frame=r_humerus_offset
      Coordinate r_shoulder_elev: default_value=0 range=(-1.570796 3.141593) clamped=false locked=true
      PhysicalOffsetFrame ground_offset: socket_parent=/ground translation=(-0.017545 -0.007 0.17) [meters]
      PhysicalOffsetFrame r_humerus_offset: socket_parent=/bodyset/r_humerus translation=(0 0 0)
      SpatialTransform: axes_held_at_zero=(rotation2 rotation3 translation1 translation2 translation3)
        TransformAxis rotation1: coordinates=r_shoulder_elev axis=(-0.05889802 0.0023 0.9982614)
            LinearFunction(coefficients=1 0)
    CustomJoint r_elbow: socket_parent_frame=r_humerus_offset socket_child_frame=r_ulna_radius_hand_offset
      Coordinate r_elbow_flex: default_value=0 range=(0 2.268928) clamped=false
      PhysicalOffsetFrame r_humerus_offset: socket_parent=/bodyset/r_humerus translation=(0.0061 -0.2904 -0.0123)
      PhysicalOffsetFrame r_ulna_radius_hand_offset: socket_parent=/bodyset/r_ulna_radius_hand translation=(0 0 0)
      SpatialTransform: axes_held_at_zero=(rotation2 rotation3 translation1 translation2 translation3)
        TransformAxis rotation1: coordinates=r_elbow_flex axis=(0.04940001 0.03660001 0.9981083)
            LinearFunction(coefficients=1 0)
  ForceSet:
    Millard2012EquilibriumMuscle [values shared by the 6 below unless stated]: fiber_damping=0.01
        default_activation=0.01 minimum_activation=0.01
      ActiveForceLengthCurve: min_norm_active_fiber_length=0.25 transition_norm_fiber_length=0.77
          max_norm_active_fiber_length=1.9 shallow_ascending_slope=0.75 minimum_value=0
      ForceVelocityCurve: concentric_slope_at_vmax=0 concentric_slope_near_vmax=0.25 isometric_slope=5
          eccentric_slope_at_vmax=0 eccentric_slope_near_vmax=0.15 max_eccentric_velocity_force_multiplier=1.4
      FiberForceLengthCurve: strain_at_zero_force=0 strain_at_one_norm_force=0.7
      TendonForceLengthCurve
    Millard2012EquilibriumMuscle TRIlong: max_isometric_force=798.52 optimal_fiber_length=0.134
        tendon_slack_length=0.143 pennation_angle_at_optimal=0.2094395 [radians]
      PathPoint P1: ground (-0.05365 -0.01373 0.14723)
      PathPoint P2: r_humerus (-0.02714 -0.11441 -0.00664)
      PathPoint P3: r_humerus (-0.03184 -0.22637 -0.01217)
      PathPoint P4: r_humerus (-0.01743 -0.26757 -0.01208)
      PathPoint P5: r_ulna_radius_hand (-0.0219 0.01046 -0.00078)
      PathWrap: wrap_object=TRI method=hybrid
      PathWrap pathwrap_0: wrap_object=TRIlonghh method=hybrid
      PathWrap pathwrap_1: wrap_object=TRIlongglen method=hybrid
    Millard2012EquilibriumMuscle TRIlat: max_isometric_force=624.3 optimal_fiber_length=0.1138
        tendon_slack_length=0.098 pennation_angle_at_optimal=0.1570796 ignore_tendon_compliance=true
      PathPoint P1: r_humerus (-0.00599 -0.12646 0.00428)
      PathPoint P2: r_humerus (-0.02344 -0.14528 0.00928)
      PathPoint P3: r_humerus (-0.03184 -0.22637 -0.01217)
      PathPoint P4: r_humerus (-0.01743 -0.26757 -0.01208)
      PathPoint P5: r_ulna_radius_hand (-0.0219 0.01046 -0.00078)
      PathWrap: wrap_object=TRI method=hybrid
    Millard2012EquilibriumMuscle TRImed: max_isometric_force=624.3 optimal_fiber_length=0.1138
        tendon_slack_length=0.098 pennation_angle_at_optimal=0.1570796 ignore_tendon_compliance=true
      PathPoint P1: r_humerus (-0.00838 -0.13695 -0.00906)
      PathPoint P2: r_humerus (-0.02601 -0.15139 -0.0108)
      PathPoint P3: r_humerus (-0.03184 -0.22637 -0.01217)
      PathPoint P4: r_humerus (-0.01743 -0.26757 -0.01208)
      PathPoint P5: r_ulna_radius_hand (-0.0219 0.01046 -0.00078)
      PathWrap: wrap_object=TRI method=hybrid
    Millard2012EquilibriumMuscle BIClong: max_isometric_force=624.3 optimal_fiber_length=0.1157
        tendon_slack_length=0.2723 pennation_angle_at_optimal=0
      PathPoint P1: ground (-0.039235 0.00347 0.14795)
      PathPoint P2: ground (-0.028945 0.01391 0.15639)
      PathPoint P3: r_humerus (0.02131 0.01793 0.01028)
      PathPoint P4: r_humerus (0.02378 -0.00511 0.01201)
      PathPoint P5: r_humerus (0.01345 -0.02827 0.00136)
      PathPoint P6: r_humerus (0.01068 -0.07736 -0.00165)
      PathPoint P7: r_humerus (0.01703 -0.12125 0.00024)
      PathPoint P8: r_humerus (0.0228 -0.1754 -0.0063)
      PathPoint P9: r_ulna_radius_hand (0.00751 -0.04839 0.02179)
      PathWrap: wrap_object=BIClonghh method=hybrid range=(2 3)
    Millard2012EquilibriumMuscle BICshort: max_isometric_force=435.56 optimal_fiber_length=0.1321
        tendon_slack_length=0.1923 pennation_angle_at_optimal=0
      PathPoint P1: ground (0.004675 -0.01231 0.13475)
      PathPoint P2: ground (-0.007075 -0.04004 0.14507)
      PathPoint P3: r_humerus (0.01117 -0.07576 -0.01101)
      PathPoint P4: r_humerus (0.01703 -0.12125 -0.01079)
      PathPoint P5: r_humerus (0.0228 -0.1754 -0.0063)
      PathPoint P6: r_ulna_radius_hand (0.00751 -0.04839 0.02179)
    Millard2012EquilibriumMuscle BRA: max_isometric_force=987.26 optimal_fiber_length=0.0858 tendon_slack_length=0.0535
        pennation_angle_at_optimal=0 ignore_tendon_compliance=true
      PathPoint P1: r_humerus (0.0068 -0.1739 -0.0036)
      PathPoint P2: r_ulna_radius_hand (-0.0032 -0.0239 0.0009)
      PathWrap: wrap_object=TRI method=hybrid
  MarkerSet:
    Marker r_acromion: ground (-0.01256 0.04 0.17)
    Marker r_humerus_epicondyle: r_humerus (0.005 -0.2904 0.03)
    Marker r_radius_styloid: r_ulna_radius_hand (-0.0011 -0.23559 0.0943)
  ProbeSet:
    Umberger2010MuscleMetabolicsProbe metabolics: probe_operation=value activation_maintenance_rate_on=true
        shortening_rate_on=true basal_rate_on=false mechanical_work_rate_on=true report_total_metabolics_only=false
      Umberger2010MuscleMetabolicsProbe_MetabolicMuscleParameterSet:
        Umberger2010MuscleMetabolicsProbe_MetabolicMuscleParameter [values shared by the 6 below unless stated]: ratio_slow_twitch_fibers=0.5
            use_provided_muscle_mass=false
        Umberger2010MuscleMetabolicsProbe_MetabolicMuscleParameter TRIlong
        Umberger2010MuscleMetabolicsProbe_MetabolicMuscleParameter TRIlat
        Umberger2010MuscleMetabolicsProbe_MetabolicMuscleParameter TRImed
        Umberger2010MuscleMetabolicsProbe_MetabolicMuscleParameter BIClong
        Umberger2010MuscleMetabolicsProbe_MetabolicMuscleParameter BICshort
        Umberger2010MuscleMetabolicsProbe_MetabolicMuscleParameter BRA
